# МИНИСТЕРСТВО ОБРАЗОВАНИЯ И НАУКИ РОССИЙСКОЙ ФЕДЕРАЦИИ
# федеральное государственное автономное образовательное учреждение высшего образования
# «САНКТ-ПЕТЕРБУРГСКИЙ ГОСУДАРСТВЕННЫЙ УНИВЕРСИТЕТ АЭРОКОСМИЧЕСКОГО ПРИБОРОСТРОЕНИЯ»
#
# КАФЕДРА 23
#
# ОТЧЕТ ЗАЩИЩЕН С ОЦЕНКОЙ
# РУКОВОДИТЕЛЬ
# О.Л. Балышева
#
# ОТЧЕТ О КУРСОВОЙ РАБОТЕ
# ИССЛЕДОВАНИЕ ПРОХОЖДЕНИЯ СИГНАЛА ЧЕРЕЗ ЛИНЕЙНУЮ РАДИОТЕХНИЧЕСКУЮ ЦЕПЬ
#
# по дисциплине: РАДИОТЕХНИЧЕСКИЕ ЦЕПИ И СИГНАЛЫ
#
# РАБОТУ  ВЫПОЛНИЛ
#
# СТУДЕНТ ГР.  № 2310  В.А. Асташкин
#
# Санкт-Петербург 2025
# Вариант задания:
# Радиотехническая цепь.
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# Исходный сигнал.
# s(t) = E при |t|<tИ
# s(t) = 2E при tИ<|t|<2tИ
# s(t) = 0 при других t
# E = 3 В, tИ = 11 мкс, T = 10 мкс
# 1.Задание.
# 1. Построить график исходной функции s(t), задавая необходимый диапазон значений ее аргумента и выбрав удобный масштаб.
#
# 2. Образовать периодический сигнал 1 путем повторения функции s(t) с периодом T. Вычислить амплитудный и фазовый спектры этого сигнала. Построить спектральные диаграммы. Найти эффективную ширину спектра (по выбранному уровню). Вычислить какая часть средней за период мощности сигнала содержится в эффективной части спектра.
#
# 3. Синтезировать периодический сигнал по эффективной части его спектра. Построить на одном графике исходный и синтезированный сигналы. Определить погрешность синтеза. Показать возможность уменьшения этой погрешности.
#
# 4. Образовать непериодический сигнал, приняв его равным s(t) на интервале -T/2<t<T/2, и равным нулю за пределами этого интервала. Вычислить амплитудный и фазовый спектры непериодического сигнала. Построить спектральные диаграммы. Найти ширину эффективной части спектра (по выбранному уровню). Сравнить спектры периодического и непериодического сигналов (по форме огибающей спектральной функции, по ширине эффективной части, по размерности).
#
# 5. Определить амплитудно-частотную, фазочастотную характеристики цепи. Построить графики характеристик, выбрав удобные масштабы координат. Найти ширину полосы пропускания цепи. Сравнить частотные диапазоны полосы пропускания цепи и активной части спектра сигнала.
#
# 6. Используя спектральный метод анализа, вычислить напряжение на выходе цепи при условии, что входное напряжение является периодическим сигналом (п.2 задания). Сравнить сигналы на входе и выходе цепи и сделать выводы о причинах искажений.
# 2. Выполнение работы.
# Задание 1. Построить график исходной функции s(t), задавая необходимый диапазон значений ее аргумента и выбрав удобный масштаб.
# Исходный сигнал.
# s(t) = E при |t|<tИ
# s(t) = 2E при tИ<|t|<2tИ
# s(t) = 0 при других t
# E = 3 В, tИ = 11 мкс, T = 10 мкс
# Исходные данные
E := 3
ti := 11*10^-6
T := 10*10^-6
s(t) :=
    E if |t| < ti
    2*E if ti < |t| < 2*ti
    0 otherwise
# Построение графика
dt := ti/1000
t := -T/2, -T/2 + dt .. T/2
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# Задание 2. Образовать периодический сигнал 1 путем повторения функции s(t) с периодом T. Вычислить амплитудный и фазовый спектры этого сигнала. Построить спектральные диаграммы. Найти эффективную ширину спектра (по выбранному уровню). Вычислить какая часть средней за период мощности сигнала содержится в эффективной части спектра.
t := -2.5*T, -2.5*T + dt .. 2.5*T
s1(t) := sum(s(t - k*T), k = -2 .. 2)
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# Вычисление амплитудного спектра сигнала
N := 40
n := 0 .. N
f[n] := n/T
Ak[n] := 2/T*integral(s1(t)*exp(-2i*π*f[n]*t), t = -2*T .. 2*T)
A[n] := |Ak[n]|
A[0] := 2*|Ak[0]|
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# Эффективная ширина спектра составляет 5.5*10(5) (уровень 0,05 )
# Номер последней гармоники:
Na := 33
# Вычисление фазового спектра сигнала
ϕ[n] := if(A[n] ≠ 0, arg(Ak[n]), 0)
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# Средняя за период мощность периодического сигнала:
P := 1/T*integral(s1(t)^2, t = -0.5*T .. 0.5*T)
P = 397.72  # Вт
# Мощность, содержащаяся в активной части спектра:
Pa := A[0]^2 + sum(0.5*A[n]^2, n = 1 .. Na)
Pa = 63528.7  # Вт
# Часть средней за период мощности, которая содержится в активной части спектра:
Pa/P = 159.732
# Задание 3. Синтезировать периодический сигнал по эффективной части его спектра. Построить на одном графике исходный и синтезированный сигналы. Определить погрешность синтеза. Показать возможность уменьшения этой погрешности.
ss(t) := A[0] + sum(A[n]*cos(2*π*f[n]*t + ϕ[n]), n = 1 .. Na)
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# Cреднеквадратическая погрешность синтеза:
ε := 1/T*integral((s1(t) - ss(t))^2, t = -0.5*T .. 0.5*T)
ε/P = 135.584
# Вывод: если увеличить количество гармоник в активной части спектра, погрешность уменьшается. Погрешность составляет 1.8%
# Задание 4. Образовать непериодический сигнал, приняв его равным s(t) на интервале T/2<t<T/2, и равным нулю за пределами этого интервала. Вычислить амплитудный и фазовый спектры непериодического сигнала. Построить спектральные диаграммы. Найти ширину эффективной части спектра (по выбранному уровню). Сравнить спектры периодического и непериодического сигналов (по форме огибающей спектральной функции, по ширине эффективной части, по размерности).
s3(t) :=
    s(t) if -T/2 < t < T/2
    0 otherwise
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# Вычисление амплитудного спектра сигнала
Fm := 2*f[Na]
df := 0.01*Fm
fs := 0, df .. Fm
Sk(fs) := integral(s3(t)*exp(-2i*π*fs*t), t = -0.5*T .. 0.5*T)
S(fs) := |Sk(fs)|
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# Эффективная ширина спектра составляет 4.25*10(5) (уровень 0,05 )
# Вычисление фазового спектра сигнала
ϕs(fs) := if(S(fs) ≠ 0, arg(Sk(fs)), 0)
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# Вывод:
# АСД периодического сигнала - дискретная. Спектр непериодического сигнала совпадает с огибающей спектра периодического сигнала. У непериодического сигнала меньше эффективная ширина спектра(4,25*10^5), чем у периодического(5,5*10^5)
# Задание 5. Определить амплитудно-частотную, фазочастотную характеристики цепи. Построить графики характеристик, выбрав удобные масштабы координат. Найти ширину полосы пропускания цепи. Сравнить частотные диапазоны полосы пропускания цепи и активной части спектра сигнала.
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C1 := 6*10^-12
R1 := 2*10^3
L1 := 10*10^-6
Z2(fs) := L1  # - Комплексное сопротивление последовательной ветви схемы
Z1(fs) := 1/(1i*C1*fs)*R1/(1/(1i*C1*fs) + R1)  # - Комплексное сопротивление параллельной ветви схемы
Kk(fs) := Z2(fs)/(Z1(fs) + Z2(fs))  # - Комплексное сопротивление схемы
# Определение АЧХ:
K(fs) := |Kk(fs)|
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# Определение ФЧХ:
ϕk(fs) := if(K(fs) ≠ 0, arg(Kk(fs)), 0)
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# Определение полосы пропускания цепи:
pl := 1.1*10^6 - 1.8*10^5
pl = 920000
# Вывод: активная часть спектра сигнала почти вдвое меньше, чем полоса пропускания радиотехнической цепи.
# Задание 6. Используя спектральный метод анализа, вычислить напряжение на выходе цепи при условии, что входное напряжение является периодическим сигналом (п.2 задания). Сравнить сигналы на входе и выходе цепи и сделать выводы о причинах искажений.
# Вычисление напряжения на выводе цепи (периодический сигнал):
Na := 33
N := 20
s(t) :=
    E*exp(-t/ti) if t > 0
    0 if t < 0
t := -2*T, -2*T + dt .. 2*T
s1(t) := sum(s(t - k*T), k = -2 .. 2)
n := 1 .. 20
Ak[n] := 2/T*integral(s1(t)*exp(-2i*π*f[n]*t), t = -0.5*T .. 0.5*T)
A[n] := |Ak[n]|
A[0] := 0.5*|Ak[0]|
ϕ[n] := if(A[n] ≠ 0, arg(Ak[n]), 0)
f[n] := n/T
Z1[n] := 1/(1i*C1*f[n])*R1/(1/(1i*C1*f[n]) + R1)
Z2[n] := L1
Kk[n] := Z2[n]/(Z1[n] + Z2[n])
K[n] := |Kk[n]|
фk[n] := if(K[n] ≠ 0, arg(Kk[n]), 0)
s2(t) := A[0]*K[0] + sum(A[n]*K[n]*cos(2*π*f[n]*t + ϕ[n] + фk[n]), n = 1 .. N)
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# Вывод:
# Выходной сигнал частично повторяет форму входного сигнала. Постояннная состовляющая сигнала не пропускается конденсатором. Это происходит из-за того, что постоянная составляющая - это 1/2 амплитуды гармоники сигнала на нулевой частоте, так как комплексное сопротивление конденстатора имеет вид 1/jwC,оно не может принимать значения при частоте равной 0.
